# Число фаз обмотки статора (3 или 4):................................................
m := 3
# Число зубцов статора, приходящееся на одну фазу:..........................
q := 2
# Число зубцов магнитопровода статора:.............................................
z_1 := q*m = 6
# Число зубцов магнитопровода ротора ("–"):.....................................
z'_2 := q*(m - 1) = 4
# Число зубцов магнитопровода ротора ("+"):.....................................
z''_2 := q*(m + 1) = 8
# Число зубцов магнитопровода ротора ("–" или "+"):.........................
z_2 := z''_2
# Угол поворота поля статора:...............................................................
α_с. := 2*π/z_1 = 60 deg
# Полюсное деление статора:.................................................................
τ_с. := α_с. = 60 deg
# Угол поворота ротора:..........................................................................
α_р. := 2*π/z_2 = 45 deg
# Полюсное деление ротора:..................................................................
τ_р. := α_р. = 45 deg
# Шаг ВИРД:.............................................................................................
α := α_с. - α_р. = 15 deg
# Коэффициент электромагнитной редукции ВИРД:..........................
k'_р. := α_с./α = 4
# Внешний диаметр пакета статора:........................................................
D_a := 136 mm
# Диаметр расточки статора:....................................................................
D_i := 90 mm
# Величина воздушного зазора:................................................................
δ := 0.2 mm
# Внешний диаметр ротора:.....................................................................
D_р. := D_i - 2*δ = 89.6 mm
# Минимальное значение центрального угла ротора:............................
β_р.min := |α| = 15 deg
# Минимальное значение центрального угла статора:..........................
β_с.min := |α| = 15 deg
# Максимальное значение центрального угла ротора:..........................
β_р.max := τ_р./2 = 22.5 deg
# Максимальное значение центрального угла статора ("–"):................
β'_с.max := τ_с./2 = 30 deg
# Максимальное значение центрального угла статора ("+"):................
β''_с.max := τ_р./2 = 22.5 deg
# Максимальное значение центрального угла статора ("–" или "+"):..
β_с.max := β''_с.max = 22.5 deg
# Значение центрального угла статора (указать своё):..........................
β_с. := β_с.max = 22.5 deg
# Значение центрального угла ротора (указать своё):...........................
β_р. := β_р.min = 15 deg
# Минимальное значение ширины зубца статора:............
b_с.min := D_i*sin(β_с.min/2) = 11.7474 mm
# Максимальное значение ширины зубца статора:............
b_с.max := D_i*sin(β_с.max/2) = 17.5581 mm
# Минимальное значение ширины зубца ротора:............
b_р.min := D_i*sin(β_р.min/2) = 11.7474 mm
# Максимальное значение ширины зубца ротора:............
b_р.max := D_i*sin(β_р.max/2) = 17.5581 mm
# Значение ширины зубца статора:.....................................
b_с. := D_i*sin(β_с./2) = 17.5581 mm
# Значение ширины зубца ротора:.....................................
b_р. := D_i*sin(β_р./2) = 11.7474 mm
# Минимальное значение коэффициента высоты зубца ротора:......................
k_р.min := 0.5
# Максимальное значение коэффициента высоты зубца ротора:.....................
k_р.max := 1
# Значение коэффициента высоты зубца ротора (указать своё):......................
k_р. := 0.57885
# Минимальное значение коэффициента высоты спинки ротора:...................
k_aр.min := 0.66
# Максимальное значение коэффициента высоты спинки ротора:..................
k_aр.max := 1
# Значение коэффициента высоты спинки ротора (указать своё):...................
k_aр. := 0.681
# Минимальное значение коэффициента высоты зубца ротора:......................
k_aс.min := 0.33
# Максимальное значение коэффициента высоты зубца ротора:.....................
k_aс.max := 1
# Значение коэффициента высоты зубца ротора (указать своё):......................
k_aс. := 0.3987
# Высота зубца ротора (менять подбором k_р.):............................................
h_р. := k_р.*b_р. = 6.79996 mm
# Высота спинки ротора (менять подбором k_a_р.):.........................................
h_aр. := k_aр.*b_р. = 7.99995 mm
# Высота спинки статора (менять подбором k_a_с_.):......................................
h_aс. := k_aс.*b_с. = 7.00043 mm
# Высота зубца статора:..............................................................
h_с. := D_a/2 - D_i/2 - h_aс. = 15.9996 mm
# Внутренний диаметр втулки ротора (должен быть 60 мм):...........................
D_вн. := D_р. - 2*h_aр. - 2*h_р. = 60.0002 mm
t := FRAME
ω := 750 rpm
ω_0 := 1/k'_р.*ω = 187.5 rpm
φ_0 := 90 °
r_р.(φ) :=
    φ ← mod(φ, τ_р.)
    r ← D_р./2
    r ← D_р./2 - h_р. if β_р./2 ≤ φ ≤ τ_р. - β_р./2
r_с.(φ) :=
    φ ← mod(φ, τ_с.)
    r ← D_i/2
    r ← D_i/2 + h_с. if β_с./2 ≤ φ ≤ τ_с. - β_с./2
φ := 0 °, 0.01 ° .. 360 °
x_р.(φ, t) := Re(r_р.(φ)*e^(1i*(φ + ω_0*t + φ_0)))
y_р.(φ, t) := Im(r_р.(φ)*e^(1i*(φ + ω_0*t + φ_0)))
x_c.(φ, t) := Re(r_с.(φ)*e^(1i*(φ + φ_0)))
y_c.(φ, t) := Im(r_с.(φ)*e^(1i*(φ + φ_0)))
x_a(φ, t) := Re(D_a/2*e^(1i*φ))
y_a(φ, t) := Im(D_a/2*e^(1i*φ))
x_вн.(φ, t) := Re(D_вн./2*e^(1i*φ))
y_вн.(φ, t) := Im(D_вн./2*e^(1i*φ))
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